# 1) System initialization

units       lj
boundary    p p p
atom_style  atomic

variable box_size           equal 10
variable volume             equal ${box_size}*${box_size}*${box_size}
variable numberDensity      equal 0.2
variable nParticles         equal ${numberDensity}*${volume}

# 1) NVE ensemble simulation

variable initialCutOff      equal 2^(1.0/6.0)
variable finalCutOff        equal 4.0
variable step               equal 0.2
variable cutOffInterval     equal ${finalCutOff}-${initialCutOff}
variable nsteps             equal ceil(${cutOffInterval}/${step})+1

label loop_start
variable index loop         1 ${nsteps}
variable r_cut              equal floor((${initialCutOff}+(${index}-1)*${step})*100)/100 #manual rounding to second decimal place

print "Simulation for r_cut = ${r_cut}"

variable region_name string     simulation_box_${r_cut}
region ${region_name} block     0.0 ${box_size} 0.0 ${box_size} 0.0 ${box_size}
create_box 1 ${region_name}
create_atoms                    1 random ${nParticles} 234567 NULL overlap 1.3

mass        1 1.0
velocity    all create 1.0 87242 mom yes dist gaussian
pair_style  lj/cut ${r_cut}
pair_coeff  1 1 1.0 1.0
pair_modify tail yes

neighbor     0.3 bin
neigh_modify delay 0 every 10 check yes

variable output_file string thermo_average_r${r_cut}.txt

print "Equilibration"

fix         equilibration all nve
timestep    0.001
run         50000
unfix       equilibration

comm_modify     cutoff 5.5
compute         rdf_all all rdf 200 cutoff 5
variable        rdf_file string rdf_${r_cut}.dat
fix             rdf_out all ave/time 100 1 100 c_rdf_all[*] file ${rdf_file} mode vector

print "Production"

variable     potEnergy equal pe
variable     kinEnergy equal ke
variable     totEnergy equal etotal
fix          production all nve
timestep     0.001
fix          2 all ave/time 20 50 1000 v_potEnergy v_kinEnergy v_totEnergy file average_${r_cut}.out
thermo       10000
thermo_style custom step pe ke etotal temp press density
run          150000
unfix        production
unfix        rdf_out
clear
next         index
jump         SELF loop_start
